# OpenSim document version 40000
Model arm:
  credits: Martin Androvich
  BodySet:
    Body humerus: mass=1 [kg] mass_center=(0 0 0) inertia=(0 0 0 0 0 0)
      PhysicalOffsetFrame humerusCenter: translation=(0 0.5 0) [meters]
        Ellipsoid humerusCenter_geom_1: socket_frame=bodyset/humerus/humerusCenter radii=(0.1 0.5 0.1)
    Body radius: mass=1 mass_center=(0 0 0) inertia=(0 0 0 0 0 0)
      PhysicalOffsetFrame radiusCenter: translation=(0 0.5 0)
        Ellipsoid radiusCenter_geom_1: socket_frame=bodyset/radius/radiusCenter radii=(0.1 0.5 0.1)
  JointSet:
    PinJoint shoulder:
      Coordinate shoulder_coord_0
      PhysicalOffsetFrame ground_offset: translation=(0 0 0)
      PhysicalOffsetFrame humerus_offset: translation=(0 1 0)
    PinJoint elbow:
      Coordinate elbow_coord_0
      PhysicalOffsetFrame humerus_offset: translation=(0 0 0)
      PhysicalOffsetFrame radius_offset: translation=(0 1 0)
