# OpenSim document version 40000
Model panda:
  credits: Martin Androvich
  Ground
  BodySet:
    Body link0: mass=2.92 [kg] mass_center=(-0.025566 -2.88e-5 0.057332) inertia=(0 0 0 0 0 0)
        meshes=meshes/visual/link0.stl
    Body link1: mass=2.74 mass_center=(0 -0.0324958 -0.0675818) inertia=(0 0 0 0 0 0) meshes=meshes/visual/link1.stl
    Body link2: mass=2.74 mass_center=(0 -0.06861 0.0322285) inertia=(0 0 0 0 0 0) meshes=meshes/visual/link2.stl
    Body link3: mass=2.38 mass_center=(0.0469893 0.0316374 -0.031704) inertia=(0 0 0 0 0 0)
        meshes=meshes/visual/link3.stl
  JointSet:
    WeldJoint world_to_link0: socket_parent_frame=ground_offset socket_child_frame=link0_offset
      PhysicalOffsetFrame ground_offset: socket_parent=/ground translation=(0 0 0) [meters]
          orientation=(-1.570796 0 0) [radians]
      PhysicalOffsetFrame link0_offset: socket_parent=/bodyset/link0 translation=(0 0 0)
    PinJoint joint0: socket_parent_frame=link0_offset socket_child_frame=link1_offset
      Coordinate joint0_coord_0
      PhysicalOffsetFrame link0_offset: socket_parent=/bodyset/link0 translation=(0 0 0.333)
      PhysicalOffsetFrame link1_offset: socket_parent=/bodyset/link1 translation=(0 0 0)
    PinJoint joint1: socket_parent_frame=link1_offset socket_child_frame=link2_offset
      Coordinate joint1_coord_0
      PhysicalOffsetFrame link1_offset: socket_parent=/bodyset/link1 translation=(0 0 0) orientation=(-1.570796 0 0)
      PhysicalOffsetFrame link2_offset: socket_parent=/bodyset/link2 translation=(0 0 0)
    PinJoint joint2: socket_parent_frame=link2_offset socket_child_frame=link3_offset
      Coordinate joint2_coord_0
      PhysicalOffsetFrame link2_offset: socket_parent=/bodyset/link2 translation=(0 -0.316 0)
          orientation=(1.570796 0 0)
      PhysicalOffsetFrame link3_offset: socket_parent=/bodyset/link3 translation=(0 0 0)
